RhoFW
0.0                   !   Mach
0     0     0.0       !   iYsym  iZsym  Zsym
0.9375 0.400 3.749    !   Sref   Cref   Bref   reference area, chord, span
0.3270 0.00 0.00      !   Xref   Yref   Zref   moment reference location (arb.)
0.020                 !   CDp
#
#==============================================================
#
SURFACE
Wing
10  1.0  100  1.0   ! Nchord   Cspace   Nspan  Sspace
#
# reflect image wing about y=0 plane
YDUPLICATE
     0.00000
#
# twist angle bias for whole surface
ANGLE
     0.00000
#
SCALE
     1.00000     1.00000     1.00000
#
# x,y,z bias for whole surface
TRANSLATE
     0.00000     0.00000     0.00000
#
#    Xle         Yle         Zle         chord       angle     Nspan  Sspace
#----------------------------------------------------------------
SECTION
     0.00000     0.00000     0.00000     0.40005     8.3274     5
AFIL
rootairfoil.dat
#----------------------------------------------------------------
SECTION
     0.04173     0.09373     0.00409     0.38505     8.5524     5
AFIL
section_01.dat
#----------------------------------------------------------------
SECTION
     0.08346     0.18745     0.00818     0.37005     8.7259     5
AFIL
section_02.dat
#----------------------------------------------------------------
SECTION
     0.12519     0.28118     0.01226     0.35505     8.8441     5
AFIL
section_03.dat
#----------------------------------------------------------------
SECTION
     0.16692     0.37490     0.01635     0.34006     8.9030     5
AFIL
section_04.dat
#----------------------------------------------------------------
SECTION
     0.20865     0.46863     0.02044     0.32506     8.8984     5
AFIL
section_05.dat
#----------------------------------------------------------------
SECTION
     0.25038     0.56236     0.02453     0.31006     8.8257     5
AFIL
section_06.dat
#----------------------------------------------------------------
SECTION
     0.29211     0.65608     0.02862     0.29506     8.6801     5
AFIL
section_07.dat
#----------------------------------------------------------------
SECTION
     0.33384     0.74981     0.03271     0.28006     8.4565     5
AFIL
section_08.dat
#----------------------------------------------------------------
SECTION
     0.37557     0.84353     0.03679     0.26506     8.1492     5
AFIL
section_09.dat
#----------------------------------------------------------------
SECTION
     0.41730     0.93726     0.04088     0.25006     7.7522     5
AFIL
section_10.dat
#----------------------------------------------------------------
SECTION
     0.45902     1.03099     0.04497     0.23506     7.2592     5
AFIL
section_11.dat
#----------------------------------------------------------------
SECTION
     0.50075     1.12471     0.04906     0.22007     6.6634     5
AFIL
section_12.dat
#----------------------------------------------------------------
SECTION
     0.54248     1.21844     0.05315     0.20507     5.9579     5
AFIL
section_13.dat
#----------------------------------------------------------------
SECTION
     0.58421     1.31216     0.05724     0.19007     5.1362     5
AFIL
section_14.dat
#----------------------------------------------------------------
SECTION
     0.62594     1.40589     0.06132     0.17507     4.1927     5
AFIL
section_15.dat
#----------------------------------------------------------------
SECTION
     0.66767     1.49962     0.06541     0.16007     3.1253     5
AFIL
section_16.dat
#----------------------------------------------------------------
SECTION
     0.70940     1.59334     0.06950     0.14507     1.9394     5
AFIL
section_17.dat
CONTROL
elevator   1.0   0.75     0.35100     0.93536     0.04362     1.0
#----------------------------------------------------------------
SECTION
     0.75113     1.68707     0.07359     0.13007     0.6589     5
AFIL
section_18.dat
CONTROL
elevator   1.0   0.75     0.35100     0.93536     0.04362     1.0
#----------------------------------------------------------------
SECTION
     0.79286     1.78079     0.07768     0.11507    -0.6417     5
AFIL
section_19.dat
CONTROL
elevator   1.0   0.75     0.35100     0.93536     0.04362     1.0
#----------------------------------------------------------------
SECTION
     0.83459     1.87452     0.08177     0.10008    -1.6726     5
AFIL
tipairfoil.dat
CONTROL
elevator   1.0   0.75     0.35100     0.93536     0.04362     1.0
#----------------------------------------------------------------
